EFECTIVE_FREQ_VIBRATION := 1*10^13
TIME_FORMATION_O_VAC := 1*10^-9
HEIGHT_MIGRATION_BARRIER := 0.5*1.6*10^-19
FORMING_COEF_ENHANCEMENT := 2.5*10^-28
CONST_BOLTZMAN := 1.38*10^-23
T := 297.763837387
E := 160513643.66
exp(-(HEIGHT_MIGRATION_BARRIER - FORMING_COEF_ENHANCEMENT*E)/(CONST_BOLTZMAN*T)) = 6.10911e-5
P := EFECTIVE_FREQ_VIBRATION*TIME_FORMATION_O_VAC*exp(-(HEIGHT_MIGRATION_BARRIER - FORMING_COEF_ENHANCEMENT*E)/(CONST_BOLTZMAN*T)) = 0.610911
