TIME_FORMATTION_O_VAC := 1*10^-11
CONCENTRATION_DECAYING_LENGHT_IONS := 0.1*10^-29
CHARGE_E := 1.6*10^-19
CONST_BOLTZMAN := 1.38*10^-23
u := 0.5
LATTICE_CONST := 623*10^-12
EFECTIVE_FREQ_VIBRATION := 1*10^13
HEIGHT_MIGRATION_BARRIER := 2.5*1.6*10^-19
T := 597
E := 196183342
E := 3691813804
DRIFT_COEF := 8*10^-10
v := LATTICE_CONST/EFECTIVE_FREQ_VIBRATION*exp(-HEIGHT_MIGRATION_BARRIER/(CONST_BOLTZMAN*T))*sinh(CHARGE_E*DRIFT_COEF*E/(CONST_BOLTZMAN*T)) = 2.07977e-19
exp((-v*TIME_FORMATTION_O_VAC)/CONCENTRATION_DECAYING_LENGHT_IONS) = 0.124958
RECOMBINATION_ENHANCEMENT_FACTOR := 1*10^20
β := RECOMBINATION_ENHANCEMENT_FACTOR*exp((-v*TIME_FORMATTION_O_VAC)/CONCENTRATION_DECAYING_LENGHT_IONS)*u = 6.24792e18
P_R0 := EFECTIVE_FREQ_VIBRATION*TIME_FORMATTION_O_VAC*exp(-HEIGHT_MIGRATION_BARRIER/(CONST_BOLTZMAN*T)) = 8.20656e-20
P_R := P_R0*β = 0.512739
