e := 1.6*10^-19
s := 6*10^-12
W := 4*e
h := 6.62*10^-34
ε_∞ := 8
ε_0 := 8.85*10^-12
β := sqrt(e^3/(π*ε_0*ε_∞)) = 4.2913e-24
F := 5*10^9
K := 1.38*10^-23
T := 600
j := e/s^2*W/h*exp(-(W - β*sqrt(F))/(K*T))*tanh(e*F*s/(2*K*T)) = 2.69461
exp(-(W - β*sqrt(F))/(K*T)) = 2.22385e-18
tanh(e*F*s/(2*K*T)) = 0.282001
e/s^2*W/h = 4.29674e18
